! hc_agent 生成算例（设计文档 8.1 标准算例目录）
! snapshot_id=SNAP-002 topology_version=TOPO-002
Clear
New object=circuit.hccircuit
Set defaultbasefrequency=50
Redirect "C:/Users/Chen/Documents/deepseek-harness/default-workspace/hc_agent_project/runs/ACCEPT/APP001/verification/work/case/LineCodes.dss"
Redirect "C:/Users/Chen/Documents/deepseek-harness/default-workspace/hc_agent_project/runs/ACCEPT/APP001/verification/work/case/Lines.dss"
Redirect "C:/Users/Chen/Documents/deepseek-harness/default-workspace/hc_agent_project/runs/ACCEPT/APP001/verification/work/case/Transformers.dss"
Redirect "C:/Users/Chen/Documents/deepseek-harness/default-workspace/hc_agent_project/runs/ACCEPT/APP001/verification/work/case/Loads.dss"
Redirect "C:/Users/Chen/Documents/deepseek-harness/default-workspace/hc_agent_project/runs/ACCEPT/APP001/verification/work/case/PVSystems.dss"
Redirect "C:/Users/Chen/Documents/deepseek-harness/default-workspace/hc_agent_project/runs/ACCEPT/APP001/verification/work/case/Sources.dss"
Redirect "C:/Users/Chen/Documents/deepseek-harness/default-workspace/hc_agent_project/runs/ACCEPT/APP001/verification/work/case/Switches.dss"
Set VoltageBases=[10, 0.4]
CalcVoltageBases
Set mode=snapshot
