! 光伏元件（设计文档 17.11：PVSystem.kVA 与 Pmpp 不等同）
New PVSystem.pv_PV001 bus1=BUS-LV-002.1.2.3 phases=3 kv=0.4 kVA=220 Pmpp=200 irradiance=1 pf=1
New PVSystem.pv_PV002 bus1=BUS-MV-003.1.2.3 phases=3 kv=10 kVA=550 Pmpp=500 irradiance=1 pf=1
