! hc_agent 生成算例（设计文档 8.1 标准算例目录）
! snapshot_id=SNAP-016 topology_version=TOPO-016
Clear
New object=circuit.hccircuit
Set defaultbasefrequency=50
Redirect "C:/Users/Chen/Documents/deepseek-harness/default-workspace/hc_agent_project/runs/ACCEPT/FD016/model/LineCodes.dss"
Redirect "C:/Users/Chen/Documents/deepseek-harness/default-workspace/hc_agent_project/runs/ACCEPT/FD016/model/Lines.dss"
Redirect "C:/Users/Chen/Documents/deepseek-harness/default-workspace/hc_agent_project/runs/ACCEPT/FD016/model/Transformers.dss"
Redirect "C:/Users/Chen/Documents/deepseek-harness/default-workspace/hc_agent_project/runs/ACCEPT/FD016/model/Loads.dss"
Redirect "C:/Users/Chen/Documents/deepseek-harness/default-workspace/hc_agent_project/runs/ACCEPT/FD016/model/PVSystems.dss"
Redirect "C:/Users/Chen/Documents/deepseek-harness/default-workspace/hc_agent_project/runs/ACCEPT/FD016/model/Sources.dss"
Redirect "C:/Users/Chen/Documents/deepseek-harness/default-workspace/hc_agent_project/runs/ACCEPT/FD016/model/Switches.dss"
Set VoltageBases=[10, 0.4]
CalcVoltageBases
Set mode=snapshot
