! 变压器元件（设计文档 17.7 / 17.11）
New Transformer.xf_DT_001 phases=3 windings=2 buses=[BUS-MV-003.1.2.3 BUS-LV-001.1.2.3] conns=[delta wye] kvs=[10 0.4] kvas=[400 400] %loadloss=1.2 XHL=3.815756806 %noloadloss=0.15 %imag=0.5 tap=[1 1.0]
New Transformer.xf_DT_002 phases=3 windings=2 buses=[BUS-MV-005.1.2.3 BUS-LV-002.1.2.3] conns=[delta wye] kvs=[10 0.4] kvas=[400 400] %loadloss=1.2 XHL=3.815756806 %noloadloss=0.15 %imag=0.5 tap=[1 1.0]
New Transformer.xf_DT_003 phases=3 windings=2 buses=[BUS-MV-007.1.2.3 BUS-LV-003.1.2.3] conns=[delta wye] kvs=[10 0.4] kvas=[200 200] %loadloss=1.2 XHL=3.815756806 %noloadloss=0.3 %imag=0.5 tap=[1 1.0]
