! LineCode 由正序/零序参数生成（设计文档 17.11）
New LineCode.LC_001 nphases=3 units=km R1=0.17 X1=0.34 R0=0.51 X0=1.02 C1=10 C0=5 normamps=600
New LineCode.LC_002 nphases=3 units=km R1=0.0068 X1=0.0025 R0=0.0204 X0=0.0075 C1=0 C0=0 normamps=5000
