! hc_agent 生成算例（设计文档 8.1 标准算例目录）
! snapshot_id=STUDY-20261016-230654 topology_version=TOPO-RM
Clear
New object=circuit.hccircuit
Set defaultbasefrequency=50
Redirect "C:/Users/Chen/Documents/deepseek-harness/default-workspace/hc_agent_project/runs/ACCEPT/RM001/engine/case/LineCodes.dss"
Redirect "C:/Users/Chen/Documents/deepseek-harness/default-workspace/hc_agent_project/runs/ACCEPT/RM001/engine/case/Lines.dss"
Redirect "C:/Users/Chen/Documents/deepseek-harness/default-workspace/hc_agent_project/runs/ACCEPT/RM001/engine/case/Transformers.dss"
Redirect "C:/Users/Chen/Documents/deepseek-harness/default-workspace/hc_agent_project/runs/ACCEPT/RM001/engine/case/Loads.dss"
Redirect "C:/Users/Chen/Documents/deepseek-harness/default-workspace/hc_agent_project/runs/ACCEPT/RM001/engine/case/PVSystems.dss"
Redirect "C:/Users/Chen/Documents/deepseek-harness/default-workspace/hc_agent_project/runs/ACCEPT/RM001/engine/case/Sources.dss"
Set VoltageBases=[10, 0.4]
CalcVoltageBases
Set mode=snapshot
